import toolbox

def createScene( node ):
    """a scene with a single rigid body, with visual and collision models"""

    obj = node.createChild('object')

    toolbox.rigid(obj,
                  velocity = [0, 5, 0,
                              0, 1, 0],
                  mesh = 'mesh/torus.obj')

    style = node.createObject('VisualStyle')
    style.displayFlags = 'showBehavior showCollision showMapping hideVisual'

    ode = node.createObject('EulerImplicitSolver')
    num = node.createObject('CGLinearSolver')

    node.dt = 1e-2
    node.animate = 1


    return 0
